# AguaClara Water Treatment Plants
# Automated Design
# User Inputs:
# Design References
# [reference: UserInputs- 1m deep.xmcd]
# [reference: DesignAssumptions-1m deep.xmcd]
# [reference: MathFunctions.xmcd]
# [reference: PipeDatabase.xmcd]
# [reference: MinorLossCoefficients.xmcd]
# [reference: FluidsFunctions.xmcd]
# Inlet Channel:
# [reference: Inlet Channel.xmcd]
W_InletChannel = 0.36385 m
L_Channel = 2.4336 m
ND_SedPipeEntrance = 12 in
# Sedimentation Tanks:
# [reference: Sedimentation.xmcd]
N_SedTanks = 2
H_SedBelowSlope = 0.6 m
H_SedBelowStraight = 0 m
H_SedPlate = 0.48 m
HW_Sed = 1.2 m
H_Sed = 1.3 m
H_SedAbove = 0.12 m
L_Sed = 3.66383 m
# Sedimentation Tank Sludge Drain:
# [reference: SludgeDrain.xmcd]
N_SedSludgeOrifices = 36
ND_SedSludge = 3 in
Q_SludgeDrainInitial = 312.686 L/min
D_SedSludgeOrifice = 0.25 in
# Sedimentation Tank Inlet Slopes:
# [reference: Sed. Inlet Slopes.xmcd]
B_SedInlet = 3.76889 cm
H_SedInlet = 6.77905 cm
AN_SedTopInlet = 43.7769 deg
AN_SedBottom = 10 deg
A_SedInlet = 1112.26 cm^2
H_SedTopInlet = 51.11 cm
H_SedBottom = 0.0940528 m
# Sedimentation Tank Effluent Launder:
# [reference: Launder.xmcd]
N_SedLaunderOrifices = 54
Q_SedLaunderOrifices = 3.51852 L/min
Z_SedLaunder = 1.14 m
# Exit Channel:
# [reference: Exit Channel.xmcd]
W_ExitChannel = 0.36385 m
ND_SedLaunder = 4 in
H_ExitChannel = 0.55 m
L_SedLaunder = 2.78613 m
L_ExitChannel = 2.4336 m
D_SedLaunderOrifice = 0.375 in
H_PltWeir = 0.312215 m
HW_ExitChannel = 0.35 m
# Lamella:
# [reference: Lamella.xmcd]
L_SedPlate = 0.554256 m
B_SedPlate = 2.40076 cm
S_SedPlate = 2.10076 cm
N_SedPlates = 87
AN_SedPlate = 60 deg
V_SedC = 10.032 m/day
V_SedUp = 70 m/day
# Flow Controller:
# [reference: FCM.xmcd]
N_Fcm = 1
ID_FcmTube = 3.175 mm
ID_FcmTube = 0.125 in
L_FcmTube = 99.0625 cm
Q_FcmTubeMax = 285 mL/min
HL_FcmValve = 15.0907 cm
# Flocculator:
# [reference: Flocculation.xmcd]
W_FlocChannel = 0.5334 m
S_FlocBaffle = [0.0669468; 0.0821572; 0.136655; 0.334734] m
B_FlocBaffle = [0.0689468; 0.0841572; 0.138655; 0.336734] m
N_FlocBafflesMin = 38
HL_Floc = 8.45648 cm
X_FlocBaffles = [
    0.5334, 3.31409;
    0.602347, 2.97736;
    0.671294, 2.64063;
    0.74024, 2.30389;
    0.809187, 1.96716;
    0.878134, 1.63042;
    0.947081, 1.29369;
    1.01603, 0.956956;
    1.08497, 0.620222;
    1.16913, 0;
    1.25329, 0;
    1.33745, 0;
    1.4216, 0;
    1.50576, 0;
    1.58992, 0;
    1.67407, 0;
    1.75823, 0;
    1.89689, 0;
    2.03554, 0;
    2.1742, 0;
    2.31285, 0;
    2.45151, 0;
    2.59016, 0;
    2.72881, 0;
    2.86747, 0;
    3.2042, 0
] m
HW_FlocStart = 1.28456 m
W_FlocPort = 0.334734 m
L_FlocBaffles = [
    1.13305, 0.865266;
    1.31762, 1.04983;
    1.13305, 0.865266;
    1.31762, 1.04983;
    1.13305, 0.865266;
    1.31762, 1.04983;
    1.13305, 0.865266;
    1.31762, 1.04983;
    1.13305, 0.865266;
    1.30241, 0;
    1.11784, 0;
    1.30241, 0;
    1.11784, 0;
    1.30241, 0;
    1.11784, 0;
    1.30241, 0;
    1.11784, 0;
    1.24791, 0;
    1.06335, 0;
    1.24791, 0;
    1.06335, 0;
    1.24791, 0;
    1.06335, 0;
    1.24791, 0;
    1.06335, 0;
    1.04983, 0
] m
H_FlocPort = 0.5334 m
N_FlocBaffles = 35
Z_FlocBaffles = [
    0, 0;
    0.0669468, 0.334734;
    0, 0;
    0.0669468, 0.334734;
    0, 0;
    0.0669468, 0.334734;
    0, 0;
    0.0669468, 0.334734;
    0, 0;
    0.0821572, 0;
    0, 0;
    0.0821572, 0;
    0, 0;
    0.0821572, 0;
    0, 0;
    0.0821572, 0;
    0, 0;
    0.136655, 0;
    0, 0;
    0.136655, 0;
    0, 0;
    0.136655, 0;
    0, 0;
    0.136655, 0;
    0, 0;
    0.334734, 0
] m
Gt_FlocMinFlow = 4670.93
N_FlocChannels = 2
# Entrance Tank:
# [reference: EntranceTank.xmcd]
ND_Lfom = 2 in
HL_Rm = 7.03971 cm
N_Lfom = 9
D_LfomOrifices = 6.35 mm
Q_LfomErrorMax = 1.3255 %
N_LfomOrifices = [5; 4; 2; 2; 2; 2; 1; 2; 1; 1]
L_Et = 0.5334 m
W_Et = 0.5334 m
HW_EtMin = 0.2 m
HW_EtMax = 0.4 m
H_Et = 0.5 m
ZW_Et = 1.53456 m
# Any additional needed elevations should be calculated in the files above.
# AutoCAD References
# [reference: basics.xmcd]
# [reference: pipe.xmcd]
# [reference: tank.xmcd]
# [reference: lamina.xmcd]
# [reference: cross.xmcd]
# [reference: Tee.xmcd]
# [reference: elbow.xmcd]
# [reference: Sludge.xmcd]
# [reference: Channel.xmcd]
# [reference: Manifold.xmcd]
# [reference: SedTankslopes.xmcd]
# [reference: Sed Tank Inlet Slope.xmcd]
# [reference: chemicalstock.xmcd]
# [reference: Sedimentation Tank.xmcd]
# [component: inputs SedTank]
# [reference: Flocculation Tank.xmcd]
# [component: inputs FlocTank]
# [reference: Entrance Tank.xmcd]
# [component: inputs EntranceTank]
