# AguaClara Design Tool
Q_Plant := □  # error: This placeholder is empty.
method := "EtFlocSedFi"
## References
# MathCAD dimension calculations:
# [reference: ExpertInputs.xmcd]
# [reference: MathFunctions.xmcd]
# [reference: PipeDatabase.xmcd]
# [reference: FluidsFunctions.xmcd]
# [reference: SedimentationTank.xmcd]
# [reference: Flocculator.xmcd]
# [reference: LFOM.xmcd]
# [reference: EntranceTank.xmcd]
# [reference: StackedRapidSandFilter.xmcd]
# [reference: LinearCdc.xmcd]
# [reference: ChemStorageTanks.xmcd]
# AutoCAD drawing programs:
# Translators:
# These are the codes that take MathCAD outputs and create AutoCAD scripts that are used to draw the plant (formerly Basics)
# [reference: MtoATranslators.xmcd]
# The wrapped MtoA translator contains the functions that the user will want to access. These functions will draw pieces with full functionality - specifying the location, dimension, and orientation of the object. Also, it contains layer control and subtraction capabilities for grouped objects.
# [reference: MtoATranslatorsWrapped.xmcd]
# Drawing functions:
# [reference: ChannelF.xmcd]
# [reference: PlumbingF.xmcd]
# [reference: TankF.xmcd]
# [reference: StairsF.xmcd]
# [reference: DrainChannelF.xmcd]
# AutoCAD Script Files:
# [reference: FlocculatorAC.xmcd]
# [reference: SedimentationTankAC.xmcd]
# [reference: EntranceTankAC.xmcd]
# [reference: ChemStockTanksAC.xmcd]
# [reference: StackedRapidSandFilterAC.xmcd]
# [reference: CdcAC.xmcd]
# [reference: OperatorAccessAC.xmcd]
# [reference: MaterialsAC.xmcd]
# Materials List:
# [reference: MaterialsList.xmcd]
# Layouts:
# This file will execute at the very end to create multiple views of the entire plant in paperspace
# [reference: LayoutsAC.xmcd]
## All variables displayed must have the standard SI units. They may not have units attached by the user.
# General
Q_Plant = 0.025 m^3/s
Pi_VenaContractaOrifice = 0.62
T_PlantWall = 0.15 m
W_SedPlate = 1.0668 m
T_ConcreteMin = 0.05 m
L_SedPlateSheet = 3 m
C_CoagStock = 400 kg/m^3
T_SedPlate = 0.002 m
Ti_CoagStock = 108000 s
T_SedWeir = 0.04 m
C_ChlorStock = 45.4545 kg/m^3
W_SedBay = 1.0668 m
Ti_ChlorineStock = 108000 s
HL_ChannelMax = 0.05 m  # Eliminate FCM variable from design specs
H_PlantFreeboard = 0.1 m
EN_DrillSeries = 0
W_HumanMin = 0.54 m
W_ChannelMin = 0.15 m
# Entrance Tank
V_EtUp = 0.008 m/s
W_EtCapture = 0.720134 m
H_EtOverflowChannel =  # error: This variable is undefined.
H_Et = 0.956934 m
H_EtTop = 0.3 m  # height of the top part of the entrance tank above the hoppers
W_Et = 0.938175 m
L_Et = 5.198 m
ND_EtDrain = 0.0762 m
HL_Lfom = 0.2 m
ZW_Et = 2.58272 m
Z_EtTop = 2.68272 m
B_EtRebar = 0.0424467 m
Z_Et = 1.72578 m  # elevation of top of slab.
ND_RMPipe = 0.254 m
Z_EtHopper = 2.38272 m
H_EtHopper = 0.656934 m
N_EtHoppers =  # error
ND_EtFlowControl = 0.1524 m
L_EtHopper = 1.51547 m
AN_EtSlope = 0.785398
L_EtDrainStopper = 0.952934 m
W_EtDC = 0.388137 m  # drain channel under entrance tank dimensions
L_EtDC = 4.79797 m
H_EtDC = 0.300038 m  # Give heights of the channel at the beginning and end and change the design specs to explain that it's sloped.
N_EtFullHopper = 2
# Flow measurement
H_EtLastSlope =  # error
HW_EtMax = 1.5 m
D_LfomOrifices = 0.04445 m
T_EtHopperLedge = 0.15 m
S_LfomRows =  # error
HL_Flowmeasure = 0.2 m
B_LfomRows = 0.05 m
H_LfomOrifice =  # error
Q_LfomScale =  # error
N_LfomOrifices = [9; 3; 2; 3]
ND_Lfom =  # error
HL_Lfom = 0.2 m
# Rapid Mix
ED_Tee = 0.176227 m^2/s^3
Z_LfomOrifices = 2.40494 m  # elevation of the center of
Z_EtExit =  # error  # elevation of center of pipe exiting the entrance tank and heading toward the flocculator
# Overflow Weir
W_EtOverflowSlot = 0.0927049 m
ND_EtOverflowDrain = 0.1524 m
H_EtOverflowCutaway = 0.0154508 m
L_EtOverflowWeir = 1.68532 m
W_DC =  # error
# Maybe give the vertical distances below the bottom of the sed tank of the beginning and end of the channel? Calculate them, display, and add to the design specs.
H_DC =  # error
L_DC =  # error
H_HumanAccess = 1.5 m
# Plant Drain Channel
Z_CoagTank = 2.95042 m
Z_CoagTankOutlet = 3.05042 m
L_CdcFloatArm = 0.41275 m
Q_CdcMax =  # error
L_CdcScaleArm = 0.50165 m
C_CoagDoseMax = 0.08 kg/m^3
B_StockOutlet = 0.1 m
L_CoagCdcTube = 1.45573 m
D_CdcTube =  # error
N_CoagCdcTubes = 2
Ti_CoagStock = 108000 s
HL_Cdc =  # error
L_CdcFloatArm = 0.41275 m
L_CdcScaleArm = 0.50165 m
ND_CoagPiping = 0.0127 m
Vol_CoagTank = 600 L
H_CoagTankAboveHeadTank = 0.3 m
Vol_ChlorineTank = 208.198 L
ND_EtFloat = 0.2032 m
K_CdcTube = 8
L_ChlorCdcTube = 2.04846 m
C_ChlorineStockMax = 50 kg/m^3
C_ChlorineDoseMax = 0.002 kg/m^3
ND_EtFlowControl = 0.1524 m
D_CdcCoag = 0.00396875 m
D_CdcChlor = 0.003175 m
HL_CoagCdc = 0.2 m
N_CoagCdcTubes = 2
N_ChlorCdcTubes = 1
C_CoagStockMax = 400 kg/m^3
HL_ChlorCdc = 0.1 m
# Coag Dose Controller
H_Floc = 2.23328 m
Z_FlocTank = 0 m  # Look at Flocculator Positioning arrays
N_FlocValves = 1
W_FlocChannel = 0.54 m
Ti_Floc = 823.352 s  # Fill last channel with bafffles from last channel
H_FlocSlope = 0.05715 m  # Fix port width to be based on energy dissipation in that channel
ED_Floc = 0.0105 m^2/s^3
# Adjust spacing after the number of baffles per channel is known.
V_Floc = 0.112665 m/s  # Check the residence time of the flocculator should be at least 20minutes
HW_FlocEnd = 2.06371 m
ND_FlocValve = 0.1016 m
CP_Floc = 75 m^(2/3)
ED_FlocAve = 0.000828649 m^2/s^3
Ti_FlocDrain = 1800 s
CP_FlocTotal =  # error
ED_FlocMax = 0.00988631 m^2/s^3
EN_FlocType :=
    "horizontal" if EN_FlocHoriz == 1
    "vertical" otherwise
N_FlocChannels = 2
G_Floc = 28.8085 1/s
L_FlocTank =  # error
HL_Floc = 0.0695721 m
ED_FlocChannelFirst =  # error
K_FlocBaffle = 2.5
HW_FlocStart = 2.13328 m
S_FlocBaffle = [0.41092; 0.41092] m
B_FlocBaffle = [0.41292; 0.41292] m
N_FlocChannelBaffles = [21; 20]
W_FlocPort = [0.39092; 0.400038] m
S_FlocBaffleFirst =  # error
HL_FlocChannels =  # error
L_FlocBaffleLower = 1.44733 m
L_FlocBaffleUpper = 1.5669 m
H_FlocPort = [0.851441; 0.851441] m
Ti_Floc = 823.352 s  # residence time of the flocculator
N_FlocBaffles =  # error
ND_FlocValve = 4 in
EN_FlocBaffle = 1
# Flocculator
# Sed Tanks
N_SedTanks = 3
L_Sed = 9.08224 m
N_SedBays = 1  # Number of bays of inlet manifolds in each sed tank
Q_SedBay = 0.00833333 m^3/s
V_SedUpBod = 0.001 m/s  # design constraints
V_SedCBod = 0.00012 m/s
V_SedUp = 0.000999072 m/s  # Actual values from this design
V_SedC =  # error
W_SedSideSlopes = 0.52505 m
AN_SedSlope = 0.872665
AN_SedHopperSlope = 0.785398
S_SedPlateMin = 0.025 m
Ti_Sed = 1892.21 s
# Sedimentation Tank Sludge Drain:
N_SedSludgeOrifices = 70  # per cell
Ti_SludgeDrain = 1800 s  # Tank Drain time
W_SedSludge = 0.115765 m  # Width of the sludge channel
H_SedSludge = 0.115765 m  # Depth of the sludge channel
# Distance center to center between drain orifices
B_SedSludgeOrifices = 0.111411 m
W_SedDrainCover = 0.155765 m
D_SedSludgeOrifice = 0.00953683 m  # Diameter of drain orifices
N_SedSludgeOrifices = 70
ND_SedSludgePipe = 0.1524 m
# Sedimentation Tank Dimensions:
Z_SedSludge = 0.115765 m  # Height from 0 of the top of the sludge drain
Z_SedSideSlopes = 0.808196 m
W_Sed = 1.0668 m  # Total tank wall height
L_Sed = 9.08224 m  # Total tank length
H_Sed = 2.16371 m
# Sedimentation Tank Inlet Channel:
EN_InletChannelGeom = 1
HW_SedInletChannel = 0.351321 m
W_SedInletChannel = 0.590037 m
L_SedChannel = 3.5004 m
H_SedInletChannel = 0.451321 m
HL_SedWeirInlet = 0.0247836 m
W_SedInletChannelPreWeir = 0.400038 m
H_SedWeirInlet = 0.326537 m
W_SedWeirInlet = 3.5004 m
# Sedimentation Tank Effluent Launder:
N_SedLaunderOrifices = 76  # Number of orifices per launder
N_SedLaunderOrificesRow =  # error  # Number of orifices per row
Z_SedLaunder = 1.88066 m
Q_SedLaunderOrifices = 0.000109649 m^3/s
B_SedLaunderOrifices = 0.1 m  # Center to center launder spacing
# More Launder Dimensions
ND_SedLaunder = 0.2032 m
D_SedLaunderOrifice = 0.015875 m
L_SedLaunder = 7.8505 m
HL_SedLaunderOrifice = 0.0407044 m
# Sedimentation Tank Inlet Manifold:
ND_SedManifold = 0.254 m
L_SedManifoldDiffuser = 0.157882 m
Z_SedManifoldPipe = 0.465748 m
ND_SedDiffuser = 0.0254 m
D_SedManifoldPort = 0.03175 m
B_SedManifoldPort = 0.05 m
N_SedManifoldPorts = 154
L_SedManifoldPipe = 7.83878 m
ED_SedInlet = 0.0105 m^2/s^3
Q_SedManifoldPort = 5.41126e-5 m^3/s
# Exit Channel:
W_SedExitChannel = 0.383425 m
H_SedExitChannel = 0.451321 m
HW_SedExitChannel = 0.311321 m  # water height in exit channel from base of channel
H_SedWeirExit = 0.286538 m
# Lamella:
L_SedPlate = 0.6 m
B_SedPlate = 0.027 m  # center to center distance between lamella
S_SedPlate = 0.025 m  # spacing between lamella
N_SedPlates = 252  # Number of Sed Plates per Sedimentation Tank Bay.
N_SedModules = 28  # Number of modules per bay
N_SedModulePlates = 9  # Number of plates per module
AN_SedPlate = 1.0472
L_SedActive = 7.85427 m
Z_SedLaunder = 1.88066 m
HW_Sed = 2.06371 m
H_Sed = 2.16371 m
# SRSF
T_FiWall = 0.25 m
H_Fi = 4.72415 m
L_Fi = 1.58239 m
W_Fi = 1.70931 m
B_FiManifoldBranch = 0.1 m
ND_FiTrunk = 0.1524 m
ND_FiManBranch = 0.0254 m
ND_FiBwTrunk = 0.254 m
ND_FiBwManBranch = 0.0381 m
ND_FiExitWaste = 0.1016 m
ND_FiBwWeirDrain =  # error
ND_FiBwDrain =  # error  # For the box that holds keeps the end of the siphon submerged
ND_FiSandOutlet = 0.0508 m
Ti_FiSand = 1276.22 s  # This is the time required to empty the filter of the sand.
ND_FiSiphonAirValve = 0.0254 m
ND_FiSiphon = 0.254 m
Q_FiSiphonMax =  # error
B_FiSiphonManOrifices = 0.106863 m
N_FiSiphonManOrifices = 12
D_FiSiphonManOrifices = 0.0508 m
Ti_FiBwInitiation =  # error
H_FiSand = 1.30083 m
N_FiLayer = 6
H_FiLayer = 0.2 m
V_FiLayer = 0.00183333 m/s
HL_FiTerminal = 0.455621 m
V_FiBw = 0.011 m/s
HL_FiBwInitiation = 1.48782 m
HL_FiBwSS = 1.28782 m
D_FiSand =  # error
N_Fi = 1
Q_Fi = 0.025 m^3/s
W_Slots =  # error
B_FiBwManSlot = 0.0047625 m
L_FiBwManSlot =  # error
B_FiManSlot = 0.0047625 m
L_FiManSlot =  # error
N_FiSlotRows = 2
Z_FiBottom = -2.75893 m
Z_FiTop = 1.96521 m
# Weirs
HL_FiWeir =  # error
L_FiWeir =  # error
Z_FiEntranceWeir = 1.81521 m
Z_FiBwWeir =  # error
Z_FiSiphonInlet = -0.867854 m  # This is the centerline elevation of the siphon orifices
Z_FiExitWeir =  # error
Z_FiExitBottom = 0.80781 m  # bottom of the filtered water box
Z_FiEntranceBottom = 0.80781 m  # bottom of the entrance box
Z_FiSiphonCoupling = 0.967617 m
Z_FiBwTop =  # error
W_FiBwDrain =  # error
H_FiBwDrain =  # error
N_Launders =  # error
L_LaunderPipeTotal =  # error
N_LaunderCouplings =  # error
N_ValveCouplings = 3
N_SedPlatesTotal = 756
N_SedPlatesPerSheet = 5
N_SedPlateSheets = 152
N_Valves = 3
A_EtFloor = 6.80749 m^2
W_FlocWithWalls = 1.38 m
L_FlocWithWalls = 9.38224 m
Vol_FlocFloor = 2153.22 L
A_FlocFloor = 14.3548 m^2
Vol_SedSlopes =  # error
A_SedWalls =  # error
A_SedFloor = 35.6563 m^2
# Materials List
# Plant Summary Calculations:
HL_PlantTotal := Z_EtTop - H_PlantFreeboard - Z_FiExitWeir
HL_PlantTotal =  # error
## Display AC variables
AC_EntranceTank =  # no stored result
AC_FlocTank =  # no stored result
AC_OperatorAccess = [
    "-layer m OpWalkwayCon"; "c t 132,132,132"; "OpWalkwayCon"; "  "; "_box 0.15,-0.15,1.51239 -15.8018,7.26857,1.71239"; "-group c OpWalkwayCon y "; "all "; "-layer s 0"; "  "; "-layer f OpWalkwayCon"
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]
AC_SedTank =  # no stored result
AC_ChemTanks =  # no stored result
AC_Filter =  # no stored result
AC_ZZLayout := AC_Layout
AC_Cdc = [
    "-layer m Cdc";
    "c t 125,0,160";
    "Cdc";
    "  ";
    "-insert https://confluence.cornell.edu/download/attachments/173604905/CdcLeverArm.dwg";
    "-8.81159,6.34867,2.70762 x 1 1  270";
    "-insert https://confluence.cornell.edu/download/attachments/173604905/CdcLeverArmBracket.dwg";
    "-9.22434,6.31667,2.68272 x 1 1  270";
    "-insert https://confluence.cornell.edu/download/attachments/173604905/CdcCht.dwg";
    "-10.15769,6.34867,2.80042 x 1 1  90"
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]
AC_MatApply = [
    "-insert https://confluence.cornell.edu/download/attachments/173604905/CdcLeverArm.dwg"; "0,0,0 x 1 1  0"; "-layer"; "material"; "Flat - Polished Gray"; "*con"; "  "; "-layer"; "material"; "PVC - White"
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]
AC_ZZLayout =  # error
AI_EtFlocSedFi = [
    "laythw"; "_-view o t"; "-plot y "; "PublishToWeb PNG.pc3"; "User 1 (824.00 x 583.00 Pixels)"; "l n e F"; ""; " ."; "y  [FILEPATH]EtFlocSedFi_t"; "n y"
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]
Q_Plant = 0.025 m^3/s
