# AguaClara Design Tool
Country = 229
Language = 0
C_ChlorineDoseMax := 2*mg/L
C_ChlorineStock := 50*gm/L
Ti_ChlorineStock := 30 hr
Country := 0  # Needs to be redefined as zero until we create a database for all countries.
## References
# MathCAD dimension calculations:
# [reference: BasicClientInputs.xmcd]
# [reference: ExpertInputs.xmcd]
# [reference: MathFunctions.xmcd]
# [reference: PipeDatabase.xmcd]
# [reference: FluidsFunctions.xmcd]
# [reference: SedimentationTank.xmcd]
# [reference: Flocculator.xmcd]
# [reference: LFOM.xmcd]
# [reference: LinearCdc.xmcd]
# [reference: ChemStorageTanks.xmcd]
# [reference: EntranceTank.xmcd]
# [reference: DrainChannel.xmcd]
# [reference: StackedRapidSandFilter.xmcd]
# [reference: MaterialsList.xmcd]
# AutoCAD drawing programs:
# Translators:
# These are the codes that take MathCAD outputs and create AutoCAD scripts that are used to draw the plant (formerly Basics)
# [reference: MtoATranslators.xmcd]
# The wrapped MtoA translator contains the functions that the user will want to access. These functions will draw pieces with full functionality - specifying the location, dimension, and orientation of the object. Also, it contains layer control and subtraction capabilities for grouped objects.
# [reference: MtoATranslatorsWrapped.xmcd]
# Drawing functions:
# [reference: ChannelF.xmcd]
# [reference: PlumbingF.xmcd]
# [reference: TankF.xmcd]
# [reference: StairsF.xmcd]
# [reference: DrainChannelF.xmcd]
# AutoCAD Script Files:
# [reference: FlocculatorAC.xmcd]
# [reference: SedimentationTankAC.xmcd]
# [reference: EntranceTankAC.xmcd]
# [reference: ChemStockTanksAC.xmcd]
# [reference: StackedRapidSandFilterAC.xmcd]
# [reference: OperatorAccessAC.xmcd]
# [reference: DrainChannelAC.xmcd]
# Layouts:
# This rearranges the plant to optimize the layout
# [reference: PlantLayoutsAC.xmcd]
# This file will execute at the very end to create multiple views of the entire plant in paperspace
# [reference: LayoutsAC.xmcd]
## All variables displayed must have the standard SI units. They may not have units attached by the user.
# General
Q_Plant = 0.018 m^3/s
Pi_VenaContractaOrifice = 0.63
T_PlantWall = 0.15 m
W_SedPlate = 1 m
T_ConcreteMin = 0.05 m
L_SedPlateSheet = 3 m
C_CoagStock = 270 kg/m^3
T_SedPlate = 0.002 m
Ti_CoagStock = 108000 s
T_SedWeir = 0.04 m
C_ChlorineStock = 50 kg/m^3
W_SedBay = 1 m
Ti_ChlorineStock = 108000 s
HL_ChannelMax = 0.05 m  # Eliminate FCM variable from design specs
H_PlantFreeboard = 0.1 m
EN_DrillSeries = 0
# Entrance Tank
V_EtUp = 0.008 m/s
W_EtCapture = 0.592897 m
H_EtOverflowChannel = 0.250441 m
H_Et = 1.2811 m
H_EtTop = 0.690551 m  # height of the top part of the entrance tank above the hoppers
W_Et = 0.808 m
L_Et = 3.79493 m
ND_EtDrain = 0.0762 m
HL_Lfom = 0.2 m
ZW_Et = 2.5059 m
Z_EtTop = 2.6059 m
Z_Et = 1.3248 m  # elevation of top of slab.
ND_RMPipe = 0.3048 m
Z_EtHopper = 1.81535 m
H_EtHopper =  # error: This variable is undefined.
N_EtHoppers = 3
ND_EtFlowControl = 0.1016 m
L_EtHopper =  # error
AN_EtSlope = 0.785398
W_EtDC = 0.462426 m  # drain channel under entrance tank dimensions
L_EtDC = 4.91958 m
H_EtDC =  # error  # Give heights of the channel at the beginning and end and change the design specs to explain that it's sloped.
# Flow measurement
D_LfomOrifices = 0.01905 m
S_LfomRows = 0.02 m
H_LfomOrifice = [0.009525; 0.029525; 0.049525; 0.069525; 0.089525; 0.109525; 0.129525; 0.149525; 0.169525; 0.189525] m
Q_LfomScale = [0; 0.0018; 0.0036; 0.0054; 0.0072; 0.009; 0.0108; 0.0126; 0.0144; 0.0162; 0.018] m^3/s
N_LfomOrifices = [22; 7; 6; 6; 4; 5; 4; 4; 3; 3]
ND_Lfom = 0.3048 m
HL_Lfom = 0.2 m
# Rapid Mix
ED_Tee = 0.0188496 m^2/s^3
Z_LfomOrifices = 2.31542 m  # elevation of the center of
Z_EtExit = 1.7227 m  # elevation of center of pipe exiting the entrance tank and heading toward the flocculator
W_DC = 1 m
# Maybe give the vertical distances below the bottom of the sed tank of the beginning and end of the channel? Calculate them, display, and add to the design specs.
H_DC =  # error
L_DC = 13.2196 m
# Plant Drain Channel
Z_CoagTank = 2.9059 m
Z_CoagTankOutlet = 3.0059 m
L_CdcFloatArm = 0.41275 m
Q_CdcMax = 3.6e-6 m^3/s
L_CdcScaleArm = 0.50165 m
C_CoagDoseMax = 0.06 kg/m^3
B_StockOutlet = 0.1 m
L_CoagCdcTube = 1.17009 m
D_CdcTube = 0.003175 m
N_CoagCdcTubes = 2
HL_Cdc = 0.2 m
L_CdcFloatArm = 0.41275 m
L_CdcScaleArm = 0.50165 m
# Coag Dose Controller
# Flocculator
H_Floc = 2.28908 m
Z_FlocTank = 0 m  # Look at Flocculator Positioning arrays
N_FlocValves = 3
W_FlocChannel = 0.6 m
Ti_Floc = 1169.96 s  # Fill last channel with bafffles from last channel
H_FlocSlope = 0.0301625 m  # Fix port width to be based on energy dissipation in that channel
ED_Floc = 0.01 m^2/s^3
# Adjust spacing after the number of baffles per channel is known.
V_Floc = 0.154871 m/s  # Check the residence time of the flocculator should be at least 20minutes
HW_FlocEnd = 1.97141 m
ND_FlocValve = 0.0508 m
CP_Floc = 100 m^(2/3)
Ti_FlocDrain = 1800 s
CP_FlocTotal = 119.76 m^(2/3)
N_FlocChannels = 5
G_Floc = 42.7149 1/s
L_FlocTank = 17.8039 m
HL_Floc = 0.217675 m
ED_FlocChannelFirst = 0.00779066 m^2/s^3
HW_FlocStart = 2.18908 m
S_FlocBaffle = [0.19371; 0.19371; 0.19371; 0.19371; 0.19371] m
B_FlocBaffle = [0.19571; 0.19571; 0.19571; 0.19571; 0.19571] m
N_FlocChannelBaffles = [17; 17; 17; 17; 16]
W_FlocPort = [0.19371; 0.19371; 0.19371; 0.19371; 0.19371] m
S_FlocBaffleFirst = 0.19371 m
HL_FlocChannels = [0.0440241; 0.0440241; 0.0440241; 0.0440241; 0.0415783] m
L_FlocBaffleLower = 1.68084 m
L_FlocBaffleUpper = 1.94852 m
H_FlocPort = [0.6; 0.6; 0.6; 0.6; 0.6] m
Ti_Floc = 1169.96 s  # residence time of the flocculator
N_FlocBaffles = 84
ND_FlocValve = 2 in
EN_FlocBaffle = 1
# Sed Tanks
N_SedTanks = 3
L_Sed = 3.56078 m
N_SedBays = 2  # Number of bays of inlet manifolds in each sed tank
Q_SedBay = 0.003 m^3/s
V_SedUpBod = 0.001 m/s  # design constraints
V_SedCBod = 0.00012 m/s
V_SedUp = 0.001 m/s  # Actual values from this design
V_SedC = 0.000119964 m/s
W_SedSideSlopes = 0.471425 m
AN_SedSlope = 0.872665
Ti_Sed = 1772.84 s
# Sedimentation Tank Sludge Drain:
N_SedSludgeOrifices = 24  # per cell
Ti_SludgeDrain = 1800 s  # Tank Drain time
W_SedSludge = 0.0671293 m  # Width of the sludge channel
H_SedSludge = 0.0671293 m  # Depth of the sludge channel
# Distance center to center between drain orifices
B_SedSludgeOrifices = 0.10693 m
W_SedDrainCover = 0.1143 m
D_SedSludgeOrifice = 0.00980191 m  # Diameter of drain orifices
N_SedSludgeOrifices = 24
ND_SedSludgePipe = 0.0762 m
# Sedimentation Tank Dimensions:
Z_SedSludge = 0.0671293 m  # Height from 0 of the top of the sludge drain
Z_SedSideSlopes = 0.736102 m
W_Sed = 2 m  # Total tank wall height
L_Sed = 3.56078 m  # Total tank length
H_Sed = 2.09086 m
# Sedimentation Tank Inlet Channel:
EN_InletChannelGeom = 1
HW_SedInletChannel = 0.303588 m
W_SedInletChannel = 0.44415 m
L_SedChannel = 6.3 m
H_SedInletChannel = 0.403588 m
HL_SedWeirInlet = 0.0133129 m
W_SedInletChannelPreWeir = 0.30415 m
H_SedWeirInlet = 0.323588 m
W_SedWeirInlet = 6.3 m
# Sedimentation Tank Effluent Launder:
N_SedLaunderOrifices = 46  # Number of orifices per launder
N_SedLaunderOrificesRow = 23  # Number of orifices per row
Z_SedLaunder = 1.88021 m
Q_SedLaunderOrifices = 6.52174e-5 m^3/s
B_SedLaunderOrifices = 0.1 m  # Center to center launder spacing
# More Launder Dimensions
ND_SedLaunder = 0.1016 m
D_SedLaunderOrifice = 0.0127 m
L_SedLaunder = 2.50781 m
HL_SedLaunderOrifice = 0.0340487 m
# Sedimentation Tank Inlet Manifold:
ND_SedManifold = 0.1524 m
L_SedManifoldDiffuser = 0.581725 m
Z_SedManifoldPipe = 0.840142 m
ND_SedDiffuser = 0.0762 m
D_SedManifoldPort = 0.04445 m
B_SedManifoldPort = 0.109957 m
N_SedManifoldPorts = 22
L_SedManifoldPipe = 2.62139 m
ED_SedInlet = 0.01 m^2/s^3
Q_SedManifoldPort = 0.000136364 m^3/s
# Exit Channel:
W_SedExitChannel = 0.250875 m
H_SedExitChannel = 0.403588 m
HW_SedExitChannel = 0.263588 m  # water height in exit channel from base of channel
H_SedWeirExit = 0.25009 m
# Lamella:
L_SedPlate = 0.75 m
B_SedPlate = 0.027 m  # center to center distance between lamella
S_SedPlate = 0.025 m  # spacing between lamella
N_SedPlates = 81  # Number of Sed Plates per Sedimentation Tank Bay.
N_SedModules = 9  # Number of modules per bay
N_SedModulePlates = 9  # Number of plates per module
AN_SedPlate = 1.0472
L_SedActive = 2.52302 m
Z_SedLaunder = 1.88021 m
HW_Sed = 1.97141 m
H_Sed = 2.09086 m
# SRSF
H_Fi = 3.74882 m
L_Fi = 1 m
W_Fi = 1.01741 m
B_FiManifoldBranch = 0.1 m
ND_FiTrunk = 0.1016 m
ND_FiManBranch = 0.0254 m
ND_FiBwTrunk = 0.1524 m
ND_FiBwManBranch = 0.0381 m
ND_FiExitWaste = 0.0762 m
ND_FiBwWeirDrain = 0.1524 m
ND_FiBwDrain = 0.0762 m  # For the box that holds keeps the end of the siphon submerged
ND_FiSandOutlet = 0.0508 m
Ti_FiSand = 452.818 s  # This is the time required to empty the filter of the sand.
ND_FiSiphonAirValve = 0.0508 m
ND_FiSiphon = 0.1524 m
Q_FiSiphonMax = 0.0570158 m^3/s
B_FiSiphonManOrifices = 0.101981 m
N_FiSiphonManOrifices = 8
D_FiSiphonManOrifices = 0.0546269 m
Ti_FiBwInitiation = 57.4429 s
H_FiSand = 1.2 m
N_FiLayer = 6
H_FiLayer = 0.2 m
V_FiLayer = 0.00183333 m/s
HL_FiTerminal = 0.451428 m
V_FiBw = 0.011 m/s
HL_FiBwInitiation = 1.588 m
HL_FiBwSS = 1.188 m
D_FiSand = 0.0005 m
N_Fi = 2
Q_Fi = 0.009 m^3/s
W_Slots = 0.0002032 m
B_FiBwManSlot = 0.0047625 m
L_FiBwManSlot = 0.0188448 m
B_FiManSlot = 0.003175 m
L_FiManSlot = 0.025102 m
N_FiSlotRows = 2
Z_FiBottom = -1.76725 m
Z_FiTop = 1.98157 m
# Weirs
HL_FiWeir = 0.0347516 m
L_FiWeir = 0.746887 m
Z_FiEntranceWeir = 1.88157 m
Z_FiBwWeir = 0.121324 m
Z_FiSiphonInlet = 0.0213238 m  # This is the centerline elevation of the siphon orifices
Z_FiExitWeir = 1.35952 m
Z_FiExitBottom = 1.00073 m  # bottom of the filtered water box
Z_FiEntranceBottom = 1.00073 m  # bottom of the entrance box
Z_FiSiphonCoupling = 1.27539 m
Z_FiBwTop = 0.340305 m
W_FiBwDrain = 0.346107 m
H_FiBwDrain = 0.33075 m
N_Launders =  # error
L_LaunderPipeTotal =  # error
N_LaunderCouplings =  # error
N_ValveCouplings = 6
N_SedPlatesTotal = 486
N_SedPlatesPerSheet = 4
N_SedPlateSheets = 122
N_Valves = 6
A_EtFloor = 4.53718 m^2
W_FlocWithWalls = 3.75 m
L_FlocWithWalls = 3.86078 m
Vol_FlocFloor = 2258.55 L
A_FlocFloor = 15.057 m^2
Vol_SedSlopes =  # error
A_SedWalls =  # error
A_SedFloor = 25.4811 m^2
# Materials List
# Plant Summary Calculations:
HL_PlantTotal := Z_EtTop - H_PlantFreeboard - Z_FiExitWeir
HL_PlantTotal = 1.14637 m
## Make AC variables that are shorter than 598 lines
AC_SedTankA :=
    AC_SedTank if last(AC_SedTank) < 598
    submatrix(AC_SedTank, 0, 598, 0, 0) otherwise
AC_FilterA :=
    AC_Filter if last(AC_Filter) < 598
    submatrix(AC_Filter, 0, 598, 0, 0) otherwise
AC_SedTankB :=
    submatrix(AC_SedTank, 599, last(AC_SedTank), 0, 0) if last(AC_SedTank) < 1197
    submatrix(AC_SedTank, 599, 1197, 0, 0) otherwise
AC_FilterB :=
    submatrix(AC_Filter, 599, last(AC_Filter), 0, 0) if last(AC_Filter) < 1197
    submatrix(AC_Filter, 599, 1197, 0, 0) otherwise
AC_SedTankC :=
    submatrix(AC_SedTank, 1198, last(AC_SedTank), 0, 0) if last(AC_SedTank) < 1796
    submatrix(AC_SedTank, 1198, 1796, 0, 0) otherwise
AC_FilterC :=
    submatrix(AC_Filter, 1198, last(AC_Filter), 0, 0) if last(AC_Filter) < 1796
    submatrix(AC_Filter, 1198, 1796, 0, 0) otherwise
AC_ChemTanksA :=
    AC_ChemTanks if last(AC_ChemTanks) < 598
    submatrix(AC_ChemTanks, 0, 598, 0, 0) otherwise
AC_FilterD :=
    submatrix(AC_Filter, 1797, last(AC_Filter), 0, 0) if last(AC_Filter) < 2395
    submatrix(AC_Filter, 1797, 2395, 0, 0) otherwise
AC_FlocTankA :=
    AC_FlocTank if last(AC_FlocTank) < 598
    submatrix(AC_FlocTank, 0, 598, 0, 0) otherwise
AC_ChemTanksB :=
    submatrix(AC_ChemTanks, 1198, last(AC_ChemTanks), 0, 0) if last(AC_ChemTanks) < 1197
    submatrix(AC_ChemTanks, 1198, 1796, 0, 0) otherwise
AC_FlocTankB :=
    submatrix(AC_FlocTank, 599, last(AC_FlocTank), 0, 0) if last(AC_FlocTank) < 1197
    submatrix(AC_FlocTank, 599, 1197, 0, 0) otherwise
AC_ChemTanksC :=
    submatrix(AC_ChemTanks, 1198, last(AC_ChemTanks), 0, 0) if last(AC_ChemTanks) < 1796
    submatrix(AC_ChemTanks, 1198, 1796, 0, 0) otherwise
AC_FlocTankC :=
    submatrix(AC_FlocTank, 1198, last(AC_FlocTank), 0, 0) if last(AC_FlocTank) < 1796
    submatrix(AC_FlocTank, 1198, 1796, 0, 0) otherwise
AC_FlocTankD :=
    submatrix(AC_FlocTank, 1797, last(AC_Filter), 0, 0) if last(AC_FlocTank) < 2395
    submatrix(AC_FlocTank, 1797, 2395, 0, 0) otherwise
AC_DrainChannelA :=
    AC_DrainChannel if last(AC_DrainChannel) < 598
    submatrix(AC_DrainChannel, 0, 598, 0, 0) otherwise
AC_EntranceTankA :=
    AC_EntranceTank if last(AC_EntranceTank) < 598
    submatrix(AC_EntranceTank, 0, 598, 0, 0) otherwise
AC_DrainChannelB :=
    submatrix(AC_DrainChannel, 1198, last(AC_DrainChannel), 0, 0) if last(AC_DrainChannel) < 1197
    submatrix(AC_DrainChannel, 1198, 1796, 0, 0) otherwise
AC_EntranceTankB :=
    submatrix(AC_EntranceTank, 599, last(AC_EntranceTank), 0, 0) if last(AC_EntranceTank) < 1197
    submatrix(AC_EntranceTank, 599, 1197, 0, 0) otherwise
AC_DrainChannelC :=
    submatrix(AC_DrainChannel, 1198, last(AC_DrainChannel), 0, 0) if last(AC_DrainChannel) < 1796
    submatrix(AC_DrainChannel, 1198, 1796, 0, 0) otherwise
AC_EntranceTankC :=
    submatrix(AC_EntranceTank, 1198, last(AC_EntranceTank), 0, 0) if last(AC_EntranceTank) < 1796
    submatrix(AC_EntranceTank, 1198, 1796, 0, 0) otherwise
AC_OperatorAccessA :=
    AC_OperatorAccess if last(AC_OperatorAccess) < 598
    submatrix(AC_OperatorAccess, 0, 598, 0, 0) otherwise
AC_OperatorAccessB :=
    submatrix(AC_OperatorAccess, 599, last(AC_OperatorAccess), 0, 0) if last(AC_OperatorAccess) < 1197
    submatrix(AC_OperatorAccess, 599, 1197, 0, 0) otherwise
AC_OperatorAccessC :=
    submatrix(AC_OperatorAccess, 1198, last(AC_OperatorAccess), 0, 0) if last(AC_OperatorAccess) < 1796
    submatrix(AC_OperatorAccess, 1198, 1796, 0, 0) otherwise
AC_ZZLayoutA :=
    AC_Layout if last(AC_Layout) < 598
    submatrix(AC_Layout, 0, 598, 0, 0) otherwise
AC_ZZLayoutB :=
    submatrix(AC_Layout, 1198, last(AC_Layout), 0, 0) if last(AC_Layout) < 1197
    submatrix(AC_Layout, 1198, 1796, 0, 0) otherwise
AC_ZZLayoutC :=
    submatrix(AC_Layout, 1198, last(AC_Layout), 0, 0) if last(AC_Layout) < 1796
    submatrix(AC_Layout, 1198, 1796, 0, 0) otherwise
## Display AC variables
AC_EntranceTankB = [
    "_cylinder -3.33457,11.68216,1.7227 0.16192 a -3.48657,11.68216,1.7227";
    "_cylinder -3.32457,11.68216,1.7227 0.14872 a -3.49657,11.68216,1.7227";
    "_zoom w -3.49657,11.51024,1.7227 -3.47657,11.85409,1.7227";
    "_subtract -3.48657,11.84409,1.7227  -3.49657,11.83088,1.7227 ";
    "rotate3d l  z -3.33457,11.68216,1.7227 90";
    "_cylinder -3.33457,11.27616,1.4687 0.16192 a -4.13414,11.27616,1.4687";
    "_cylinder -3.32457,11.27616,1.4687 0.14872 a -4.14414,11.27616,1.4687";
    "_zoom w -4.14414,11.10424,1.4687 -4.12414,11.44809,1.4687";
    "_subtract -4.13414,11.43809,1.4687  -4.14414,11.42488,1.4687 ";
    "rotate3d l  y -3.33457,11.27616,1.4687 270"
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]
AC_EntranceTankA = [
    "-layer m Cdc"; "c t 125,0,160"; "Cdc"; "  "; "-insert CdcLeverArm.dwg"; "-3.66713,12.12065,2.6308 x 1 1  0"; "-insert CdcLeverArmBracket.dwg"; "-3.63513,11.7079,2.6059 x 1 1  0"; "-insert CdcCht.dwg"; "-4.39733,11.6238,2.7236 x 1 1  0"
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]
AC_EntranceTankC =  # error
AC_FlocTankA = [
    "-layer m FlocTankCon"; "c t 132,132,132"; "FlocTankCon"; "  "; "_-view o t _zoom w 0.16,6.29,0 -3.72078,10.21,2.28908 _box 0,6.45,0 -3.56078,10.05,2.28908 _box 0.15,6.3,-0.15 -3.71078,10.2,2.28908 _subtract 0.15,6.3,-0.15  0,6.45,0 "; "_box -3.71078,7.05,0 0.15,7.2,2.28908"; "-array l  R 4 1 0.75"; "-group c FlocTankCon y "; "all "; "-layer s 0"
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]
AC_FlocTankC =  # error
AC_FlocTankD =  # error
AC_FlocTankB = [
    "_subtract -0.22621,9.94979,0.21192  -0.14021,9.96407,0.21192 ";
    "_cylinder -0.39405,10.126,0.21192 0.17621 a -0.31805,10.126,0.21192";
    "_cylinder -0.40405,10.126,0.21192 0.16192 a -0.30805,10.126,0.21192";
    "_subtract -0.39405,9.94979,0.21192  -0.40405,9.96407,0.21192 ";
    "_cylinder -0.31805,10.126,0.21192 0.16192 a -0.22621,10.126,0.21192";
    "_cylinder -0.32805,10.126,0.21192 0.14872 a -0.21621,10.126,0.21192";
    "_subtract -0.31805,9.96407,0.21192  -0.32805,9.97728,0.21192 ";
    "_union -0.15021,9.94979,0.21192 -0.39405,9.94979,0.21192 -0.22621,9.96407,0.21192 ";
    "rotate3d l  z -0.22621,10.126,0.21192 270";
    "-group c FlocRMCouplingPlu y ";
    "all ";
    "-layer s 0";
    "  ";
    "-layer f FlocRMCouplingPlu";
    "  "
]
AC_OperatorAccessA = [
    "-layer m OpWalkwayCon"; "c t 132,132,132"; "OpWalkwayCon"; "  "; "_-view o f"; "_pline"; "-6.38413,2.9186"; "-6.08413,2.9186"; "-6.08413,2.72126"; "-5.78413,2.72126"
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]
AC_OperatorAccessB =  # error
AC_OperatorAccessC =  # error
AC_SedTankA = [
    "-layer m SedTankCon"; "c t 132,132,132"; "SedTankCon"; "  "; "_-view o r"; "_pline"; "2.05,0"; "1.53356,0"; "1.53356,0.06713"; "1.55715,0.06713"
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]
AC_SedTankB = [
    "rotate3d l  x 0.71262,1.5,0.02268 225"; "-group c SedSludgeFittingPlu y "; "all "; "-layer s 0"; "  "; "-layer f SedSludgeFittingPlu"; "  "; "-layer m SedSludgeAdapterPlu"; "c t 255,0,0"; "SedSludgeAdapterPlu"
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]
AC_SedTankC = [
    "-group c SedIChannelElbowPlu y "; "all "; "-layer s 0"; "  "; "-layer f SedIChannelElbowPlu"; "  "; "-layer m SedEChannelVertCouplingPlu"; "c t 0,255,0"; "SedEChannelVertCouplingPlu"; "  "
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]
AC_ChemTanksA = [
    "-layer m CoagTanks"; "c t 132,132,132"; "CoagTanks"; "  "; "_-view o t"; "_zoom w -4.97453,11.84,1.6844 -4.33493,12.4796,2.9286"; "_cylinder -4.65473,12.1598,2.9186 0.3098 a -5.87893,12.1598,2.9186"; "rotate3d l  y -4.65473,12.1598,2.9186 90"; "-group c CoagTanks y "; "all "
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]
AC_ChemTanksB =  # error
AC_ChemTanksC =  # error
AC_DrainChannelA = [
    "-layer m DC"; "c t 214,214,214"; "DC"; "  "; "3dpoly"; "0.2,11.7,1.1748"; "0.2,11.7,0.79358"; "0.2,12.46243,0.79358"; "0.2,12.46243,1.1748"; "0.2,11.7,1.1748 "
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]
AC_DrainChannelB =  # error
AC_DrainChannelC =  # error
# AC_ZZLayoutA | AC_ZZLayoutC
AC_ZZLayoutB
AC_ZPlantLayout = ["-layer t Floc*"; "t Sed*"; "t DC"; "  "; "mirror3d all  yz -1.78039,0 y  "; "-layer s 0"; "  "; "-layer f Floc*"; "f Sed*"; "f DC"; "  "; "-layer t Fi*"; "  "; "_move all  -3.53031,-1.26741,-1.76725 -8.05455,8.88259,-1.76725"; "-layer s 0"; "  "; "-layer f Fi*"; "f Fi*"; "  "]
AC_FilterA = [
    "-layer m FiInletchannelCon"; "c t 214,214,214"; "FiInletchannelCon"; "  "; "_zoom w -0.34654,-0.16,1.00073 -0.32654,0.15,1.00073"; "_box -0.34654,0,1.00073 2.20828,0.33654,2.01632"; "_box -0.33654,-0.15,0.85073 2.19828,0.48654,2.01632"; "_subtract -0.33654,-0.15,0.85073  -0.34654,0,1.00073 "; "rotate3d l  z -0.33654,0,1.00073 270"; "_box 0.15,-2.53481,0.85073 -0.48654,-2.68481,2.01632"
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]
AC_FilterD =  # error
AC_FilterB = [
    "g FiTankCon";
    " g DeleteMe ";
    "-layer f FiTankCon";
    "  ";
    "_cylinder -3.46825,-0.34208,-1.13868 0.06429 a -3.41125,-0.34208,-1.13868";
    "_cylinder -3.47825,-0.34208,-1.13868 0.05715 a -3.40125,-0.34208,-1.13868";
    "_subtract -3.46825,-0.40637,-1.13868  -3.40125,-0.39923,-1.13868 ";
    "_cylinder -3.53031,-0.34208,-1.13868 0.06429 a -3.47331,-0.34208,-1.13868";
    "_cylinder -3.54031,-0.34208,-1.13868 0.05715 a -3.46331,-0.34208,-1.13868";
    "_subtract -3.53031,-0.40637,-1.13868  -3.54031,-0.39923,-1.13868 "
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]
AC_FilterC = [
    "_union -0.57161,-0.43415,0.89898 -0.73036,-0.43415,0.89898 -0.62861,-0.42621,0.89898 "; "rotate3d l  y -0.62861,-0.34208,0.89898 90"; "-group c DeleteMe y "; "l "; "-layer t FiEntexitboxesCon"; "  "; "_subtract"; "g FiEntexitboxesCon"; " g DeleteMe "; "-layer f FiEntexitboxesCon"
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]
HW_Sed = 1.97141 m
# this variable is displayed to ensure that LabView can read AC.ZZEnd (error in LabView "read mathcad file" code that it misses the last variable)
Q_Plant = 0.018 m^3/s
