# [reference: MasterProgram.xmcd]
TopView :=
    NewLayout ← concat("layout", sp, "n", sp, "TopView")
    SetLayout ← concat("layout", sp, "s", sp, "TopView")
    TopView ← concat(viewtop, "all")
    return stack(NewLayout, SetLayout, TopView)
FrontView :=
    NewLayout ← concat("layout", sp, "n", sp, "FrontView")
    SetLayout ← concat("layout", sp, "s", sp, "FrontView")
    FrontView ← concat(viewfront, "all")
    return stack(NewLayout, SetLayout, FrontView)
LeftView :=
    NewLayout ← concat("layout", sp, "n", sp, "LeftView")
    SetLayout ← concat("layout", sp, "s", sp, "LeftView")
    LeftView ← concat(viewleftside, sp, "all")
    return stack(NewLayout, SetLayout, LeftView)
RightView :=
    NewLayout ← concat("layout", sp, "n", sp, "RightView")
    SetLayout ← concat("layout", sp, "s", sp, "RightView")
    RightView ← concat(viewrightside, "all")
    return stack(NewLayout, SetLayout, RightView)
FreezeMultiple(LayerVector) :=
    Local ← concat("-layer", sp, "f", sp, LayerVector[0])
    for i ∈ 1 .. last(LayerVector)
        Local ← stack(Local, concat(sp, sp, "f", sp, LayerVector[i]))
    return stack(Local, "")
SedTankLayers := [
    "channel";
    "tank";
    "bottomslopes";
    "echannel";
    "echanneltank";
    "lamina";
    "pipeframe";
    "connecting pipe";
    "ichanneltank";
    "WasteElbow";
    "draincover";
    "launder";
    "manifoldpipe";
    "manifoldelbow";
    "SedDrainCoupling";
    "SedDrainPipe";
    "SedDrainAdapter";
    "SedDrainValves";
    "launder cap";
    "sedweirinlet";
    "sedweirexit";
    "inletweirtee";
    "weirpipecap";
    "laundercouplingcap";
    "exitweirelbow";
    "exitweir";
    "launderorificecap";
    "launder coupling";
    "inletweir";
    "wastepipe";
    "exitweirelbow";
    "inletpipe";
    "chimney stops";
    "iccoupling"
]
EntranceTankLayers := ["entrancetank"; "MicroMixOrifice"; "RMPipe"; "RMCoupling"; "RMElbow"; "RMElbow2"; "RMCoupling2"]
FlocTankLayers := ["floctank"; "Baffle"; "FlocDrainCoupling"; "FlocDrainPipe"; "FlocDrainAdapter"; "FlocDrainValve"]
TopViewEntrance :=
    NewLayout ← concat("layout", sp, "n", sp, "TopViewEntranceTank")
    SetLayout ← concat("layout", sp, "s", sp, "TopViewEntranceTank")
    FreezeFloc ← FreezeMultiple(FlocTankLayers)
    FreezeTanks ← layer_freeze("alumtanks")
    FreezeSed ← FreezeMultiple(SedTankLayers)
    TopView ← concat(viewtop, "all")
    return stack(NewLayout, SetLayout, FreezeFloc, FreezeTanks, FreezeSed, TopView)
RightViewEntrance :=
    NewLayout ← concat("layout", sp, "n", sp, "RightViewEntranceTank")
    SetLayout ← concat("layout", sp, "s", sp, "RightViewEntranceTank")
    RightView ← concat(viewrightside, "all")
    return stack(NewLayout, SetLayout, RightView)
RightViewEntrance :=
    NewLayout ← concat("layout", sp, "n", sp, "LeftViewEntranceTank")
    SetLayout ← concat("layout", sp, "s", sp, "LeftViewEntranceTank")
    LeftView ← concat(viewleftside, sp, "all")
    return stack(NewLayout, SetLayout, LeftView)
FrontViewEntrance :=
    NewLayout ← concat("layout", sp, "n", sp, "FrontViewEntranceTank")
    SetLayout ← concat("layout", sp, "s", sp, "FrontViewEntranceTank")
    RightView ← concat(viewfront, "all")
    return stack(NewLayout, SetLayout, RightView)
AC_Layout := stack(TopView, LeftView, RightView, FrontView, TopViewEntrance, RightViewEntrance, RightViewEntrance, FrontViewEntrance)
# [component: inputs AC_Layout]
