# Operator Access
# Layers
OpWalkwayLayer := layer_new("OpWalkwayCon", grey)
SelectOpWalkway := SelectLayer("OpWalkwayCon")
OpWalkwayFrz := FreezeLayer("OpWalkwayCon")
SubtractFromOpWalkway := SubtractF(["OpWalkwayCon"], "DeleteMe")
# Main floor
Floor_Origin :=
    [Plant_Origin[0]; Plant_Origin[1]; Z_Walkway - T_Floor] if EN_DoubleTrain == 0
    otherwise
        [
            Et_Origin[0] + T_PlantWall + (Et_Origin[0] - Plant_Origin[0]);
            (Et_Origin[1] + W_Et + T_PlantWall) + W_DCWalkway + W_EtWalkway;
            Z_Walkway - T_Floor
        ]
Floor_Dim :=
    if EN_DoubleTrain == 0
        [
            -(Plant_Origin[0] - (Fi_origin[0] - L_Fi));
            N_SedTanks*(W_SedBay + T_PlantWall) + N_FlocChannels*(W_FlocChannel + T_PlantWall) + W_EtWalkway + W_Et + T_PlantWall;
            T_Floor
        ]
    otherwise
        [
            max(T_PlantWall + (Et_Origin[0] - Plant_Origin[0]) + (L_Et + 2*W_DCWalkway - T_ChannelWall + T_ConcreteMin + L_ChemStairs + W_EtChemPlatform), 3*T_PlantWall + (Et_Origin[0] - Plant_Origin[0]) + 2*L_Floc + 2*W_DCWalkway);
            N_SedTanks*(W_SedBay + T_PlantWall) + 5*T_PlantWall - T_SedWallDivider + N_FlocChannels*(W_FlocChannel + T_FlocChannelWall) - T_FlocChannelWall + 3*W_EtWalkway + W_Et + W_Fi + T_FiWall;
            T_Floor
        ]
FloorBox := BoxF(Floor_Origin, {
    Floor_Origin + Floor_Dim if EN_DoubleTrain == 0
    [Floor_Origin[0] - Floor_Dim[0]; Floor_Origin[1] - Floor_Dim[1]; Floor_Origin[2] + Floor_Dim[2]] otherwise
}, [0; 0; 0]*deg)
PlantFloorScript := stack(OpWalkwayLayer, FloorBox, OpWalkwayFrz)
# Sed tank floor cuts
SedSubBox_Origin := [Plant_Origin[0]; Plant_Origin[1]; Z_Walkway - T_Floor - zc]
SedSubBox_Dim := [-L_Sed - T_PlantWall; N_SedTanks*(W_SedBay + T_PlantWall); T_Floor + 2*zc]
SedDrainBox_Origin := [
    SedSludgeDrainValve_Origin[0] + ValveSocket(ND_SedJetReverser);
    SedSludgeDrainValve_Origin[1] - ValveLength(ND_SedJetReverser)/2;
    Z_Walkway - T_Floor - zc
]
SedDrainBox_Dim := [-ValveLength(ND_SedJetReverser); ValveLength(ND_SedJetReverser); T_Floor + 2*zc]
SedSubBox := BoxF(SedSubBox_Origin, SedSubBox_Origin + SedSubBox_Dim, [0; 0; 0]*deg)
SedDrainSubBox := BoxF(SedDrainBox_Origin, SedDrainBox_Origin + SedDrainBox_Dim, [0; 0; 0]*deg)
ArraySedDrainBox := ArrayLast(N_SedTanks, 1, W_Sed + T_PlantWall)
MirrorSedBox := Mirror3dLast("yz", [Floc_Origin[0] - L_Floc - W_PlantDC/2 - T_PlantWall; 0 m], "n")
SedFloorCutScript := stack(SedSubBox, SedDrainSubBox, ArraySedDrainBox)
# Flocculator floor cuts
FlocSubBox_Origin := [Floc_Origin[0]; Floc_Origin[1]; Z_Walkway - T_Floor - zc]
FlocSubBox_Dim := [-T_PlantWall - L_Sed; N_FlocChannels*(T_PlantWall + W_FlocChannel); T_Floor + 2*zc]
FlocSubBox := BoxF(FlocSubBox_Origin, FlocSubBox_Origin + FlocSubBox_Dim, [0; 0; 0]*deg)
FlocDrainBox_Origin := [
    Floc_Origin[0] - L_Sed - T_PlantWall - MaleAdapterLength(ND_FlocValve) + ValveSocket(ND_FlocValve);
    Floc_Origin[1] + W_FlocChannel/2 - ValveLength(ND_FlocValve)/2;
    Z_Walkway - T_Floor - zc
]
FlocDrainBox_Dim := [-ValveLength(ND_FlocValve); ValveLength(ND_FlocValve); T_Floor + 2*zc]
FlocDrainBox := BoxF(FlocDrainBox_Origin, FlocDrainBox_Origin + FlocDrainBox_Dim, [0; 0; 0]*deg)
ArrayFlocDrainBox := ArrayLast(N_FlocChannels, 1, W_FlocChannel + T_PlantWall)
MirrorFlocBox := Mirror3dAll("yz", [Floc_Origin[0] - L_Floc - W_PlantDC/2 - T_PlantWall; 0 m], "n")
FlocFloorCutScript := stack(FlocSubBox, FlocDrainBox, ArrayFlocDrainBox)
# Entrance tank floor cut
EtSubBox_Origin := [Et_Origin[0] + T_PlantWall; Et_Origin[1] - T_PlantWall; Z_Walkway - T_Floor - zc]
EtSubBox_Dim := [-2*T_PlantWall - L_Et; T_PlantWall + W_Et; T_Floor + 2*zc]
EtSubBox := BoxF(EtSubBox_Origin, EtSubBox_Origin + EtSubBox_Dim, [0; 0; 0]*deg)
# Dose controller floor cuts
DosingSubBox_Dim := [-L_CdcLever - S_Fitting; 2*ConRadius(ND_EtFloat); T_Floor + 2*zc]
DosingSubBox_Origin :=
    [Et_Origin[0] - L_Et - T_PlantWall; Et_Origin[1] + S_Fitting; Z_Walkway - T_Floor - zc] if EN_DoubleTrain == 0
    otherwise
        [
            Et_Origin[0] - L_Et - T_PlantWall - (W_DCWalkway + 3*T_PlantWall + L_LfomChannel - T_ChannelWall + T_ConcreteMin);
            Et_Origin[1] - .5*S_Fitting + 1.5*W_LfomChannel;
            Z_Walkway - T_Floor - zc
        ]
DosingSubBox := BoxF(DosingSubBox_Origin, DosingSubBox_Origin + DosingSubBox_Dim, [0; 0; 0]*deg)
ChemDrainSubBox := BoxF([
    ChemPlatformWall_Origin[0] + T_PlantWall;
    CoagTank_Origin[1] + R_CoagTank + T_ChemTankWall + S_ChemTankBorder - 0.5*W_EtChemPlatform - L_PlatformDrainHole;
    ChemPlatformWall_Origin[2] - T_Floor
], [
    ChemPlatformWall_Origin[0] + T_PlantWall + W_PlatformHole + zc;
    CoagTank_Origin[1] + R_CoagTank + T_ChemTankWall + S_ChemTankBorder - 0.5*W_EtChemPlatform + L_PlatformDrainHole;
    ChemPlatformWall_Origin[2]
], [0; 0; 0]*deg)
CdcFloorCutScript := stack(DosingSubBox, ChemDrainSubBox)
# Filter floor cuts
FilterSubBox_Origin := [Fi_origin[0] + T_FiWall; Fi_origin[1] - T_FiWall; Z_Walkway - T_Floor - zc]
FilterSubBox_Dim := [-T_FiWall - L_Fi; T_FiWall + N_Fi*(W_Fi + T_FiWall); T_Floor + 2*zc]
FilterSubBox := BoxF(FilterSubBox_Origin, FilterSubBox_Origin + FilterSubBox_Dim, [0; 0; 0]*deg)
FiSiphonSubBox_Origin := [
    Fi_origin[0] + T_FiWall + SocketDepth(ND_FiSiphon) + ShortTeeLength(ND_FiSiphon);
    Fi_origin[1] + S_Fitting + ConRadius(ND_FiSiphon);
    Z_Walkway - T_Floor - zc
]
FiSiphonSubBox := CylinderF(FiSiphonSubBox_Origin, outerradius(3 in), T_Floor + 2*zc, [0; 90]*deg)
ArrayFiSiphonSubBox := ArrayLast(N_Fi, 1, W_Fi + T_FiWall)
FiAuxSubBox_Origin := [
    FiInletChannel_Origin[0] + T_PlantWall;
    FiInletChannel_Origin[1] - T_PlantWall;
    Z_Walkway - T_Floor - zc
]
FiAuxSubBox_Dim := [
    -W_FiInletChannel - L_FiOverflow - L_FiExit - 4*T_PlantWall;
    L_FiInletChannel + 2*T_PlantWall;
    T_Floor + 2*zc
]
FiAuxSubBox := BoxF(FiAuxSubBox_Origin, FiAuxSubBox_Origin + FiAuxSubBox_Dim, [0; 0; 0]*deg)
MirrorFilterBox := Mirror3dLast("yz", [Floc_Origin[0] - L_Floc - W_PlantDC/2 - T_PlantWall; 0 m], "n")
FiFloorCutScript := stack(FilterSubBox, FiSiphonSubBox, ArrayFiSiphonSubBox, FiAuxSubBox, GroupDelete, SubtractFromOpWalkway)
FiAuxPeninsula_Origin := [
    FiOverflowBox_Origin[0];
    FiEntranceBox_origin[1] + 2*W_FiEntrance + W_FiOverflow + 3*T_PlantWall;
    Z_Walkway - T_Floor
]
FiAuxPeninsula_Dim := [-L_FiOverflow - L_FiExit - 2*T_PlantWall; W_FiOverflow; T_Floor]
FiAuxPeninsula := BoxF(FiAuxPeninsula_Origin, FiAuxPeninsula_Origin + FiAuxPeninsula_Dim, [0; 0; 0]*deg)
ArrayFiAuxPeninsula := ArrayLast(max(N_FiPeninsulas, 1), 1, 2*W_FiEntrance + W_FiOverflow + 4*T_PlantWall)
FiAuxPeninsulaScript := stack(SelectOpWalkway, FiAuxPeninsula, ArrayFiAuxPeninsula, Union_All, OpWalkwayFrz)
FiFloorScript :=
    stack(FiFloorCutScript, FiAuxPeninsulaScript) if N_FiPeninsulas > 0
    FiFloorCutScript otherwise
AC_OperatorAccess := stack(PlantFloorScript, SedFloorCutScript, FlocFloorCutScript, EtSubBox, CdcFloorCutScript, FiFloorScript)
