# [reference: MasterProgram.xmcd]
N_Fi := 2
# Arbitrary design variables.
# for box spacing and heights
FilterInletTank_origin := [echanneltank_origin[0]; echanneltank_origin[1]; echanneltank_origin[2]] = [0; -0.82578; 1.36535] m
BoxDist := 2 m
# horizontal distance from inlet box to filter
Headloss := 10 cm  # difference in depth between inlet and outlet box
FilterInletBox_origin := [echannelbox_origin[0] - T_PlantWall; echannelbox_origin[1] - W_ExitChannel; echannelbox_origin[2]] = [-0.942085; -0.942085; 1.36535] m
filterinletbox_dim := [T_PlantWall; W_ExitChannel; H_ExitChannel] = [0.15; 0.792085; 0.57862] m
Sedtankexitchannelscript :=
    layer2 ← layer_new("echannel", ltgrey)
    channel1 ← ChannelDrawing(echannel_origin, [W_Sed + 2*T_PlantWall; W_ExitChannel; H_ExitChannel], T_ChannelWall)
    rotate1 ← rotate(echannel_origin, 90)
    bigunion ← union_allA
    layerset ← layer_set("0")
    layerfreeze2 ← layer_freeze("echannel")
    one ← stack(layer2, channel1, rotate1, bigunion, layerset, layerfreeze2)
    return ← one
sedechanneltankscript :=
    layernewect ← layer_new("echanneltank", ltgrey)
    tankect ← Tank([
        echanneltank_origin[0];
        echanneltank_origin[1] - (N_Fi*echanneltank_dim)[1] - (N_Fi*2*T_PlantWall);
        echanneltank_origin[2]
    ], echanneltank_dim, T_PlantWall)
    layerset ← layer_set("0")
    layerfreezeect ← layer_freeze("echanneltank")
    one ← stack(layernewect, tankect, layerset, layerfreezeect)
    return one
# ***Drawn for reference***
FilterInletBoxscript :=
    layernewfib ← layer_new("SRSF inlet box", ltgrey)
    tankfib ← Tank(FilterInletTank_origin, echanneltank_dim, T_PlantWall)
    layerset ← layer_set("0")
    layerfreezefib ← layer_freeze("SRSF inlet box")
    one ← stack(layernewfib, tankfib, layerset, layerfreezefib)
    return one
FilterOutletBoxscript :=
    layernewfob ← layer_new("SRSF outlet box", ltgrey)
    tankfob ← Tank([
        FilterInletTank_origin[0];
        FilterInletTank_origin[1] - BoxDist;
        FilterInletTank_origin[2] - Headloss
    ], echanneltank_dim, T_PlantWall)
    layerset ← layer_set("0")
    layerfreezefob ← layer_freeze("SRSF outlet box")
    one ← stack(layernewfob, tankfob, layerset, layerfreezefob)
    return one
filterscript :=
    layernewfilt ← layer_new("SRSF", ltgrey)
    tankfilt ← Tank([
        FilterInletTank_origin[0];
        FilterInletTank_origin[1] - BoxDist/2;
        FilterInletTank_origin[2] - H_Sed
    ], [echanneltank_dim[0]; echanneltank_dim[1]; echanneltank_dim[2] + H_Sed], T_PlantWall)
    layerset ← layer_set("0")
    layerfreezefilt ← layer_freeze("SRSF")
    one ← stack(layernewfilt, tankfilt, layerset, layerfreezefilt)
    return one
AC_Filter := stack(Sedtankexitchannelscript, sedechanneltankscript, FilterInletBoxscript, FilterOutletBoxscript, filterscript)
# [component: inputs AC_Filter]
