# AguaClara Water Treatment Plants
# Automated Design
# Add variable descriptions next to every varible so it is easy to interpret what this all means.
# Design References
# [reference: BasicInputs3Sed3Bays.xmcd]
# Use BasicClientInputs and ExpertClientInputs when this is run by LabVIEW.
# Use BasicInputs and ExpertInputs to use the program in MathCAD
# Change the reference by
# - right clicking
# - select properties
# - reference tab
# - type in the correct file name
# [reference: ExpertInputs.xmcd]
# [reference: DesignAssumptions.xmcd]
# [reference: MathFunctions.xmcd]
# [reference: PipeDatabase.xmcd]
# [reference: MinorLossCoefficients.xmcd]
# [reference: FluidsFunctions.xmcd]
# [reference: Sedimentation Tank.xmcd]
# [reference: Floc Hopper.xmcd]
# [reference: FCM.xmcd]
# [reference: Flocculator 3.xmcd]
# [reference: RapidMixer.xmcd]
# [reference: Materials List.xmcd]
# [reference: EntranceTankDim.xmcd]
Q_Plant = 22 L/s
# Sed Tanks and Slopes:
B_SedPort = 3.68418 cm  # Height of the narrowest part of the manifold ports
N_SedTanks = 3
W_SedPort = 3.68418 cm
H_SedBetween = 0 cm  # Distance from the top of the inlet manifold to the bottom of the ledge supporting the lamella frame
A_SedPort = 13.5732 cm^2  # Port Area
L_Sed = 3.2795 m
W_SedSludgeFlat = 5 cm  # Distance between tips of manifold plates (space alloted for the drain holes
N_SedBays = 3  # Number of bays of inlet manifolds in each sed tank
AN_SedTopInlet = 60 deg  # Angle of the top of the inlet manifold
L_SedPort = 4.25412 cm  # Length of the port through which water exits the inlet manifold
AN_SedBottom = 10 deg  # Angle of the bottom of inlet manifold
W_SedSlopePlate = 30 cm  # Width of ferrous cement plates in whice one manifold port is cut
Q_SedBay = 2.44444 L/s
W_SedBayActual = 0.82 m
L_SedSlopeManifold = 0.700718 m  # This is the extra distance between the last slope and the wall
# Sedimentation Tank Sludge Drain:
N_SedSludgeOrifices = 21  # per cell
Ti_SludgeDrain = 30 min  # Tank Drain time
W_SedSludge = 8.93855 cm  # Width of the sludge channel
B_SedSludgeOrifices = 15 cm  # Distance center to center between drain orifices
H_SedSludge = 4.46928 cm  # Depth of the sludge channel
T_SedSludge = 7.4641 cm
T_SedSludge = 7.4641 cm
# Thickness of the plate topping the sludge channel
# through which drain holes are formed
W_SedDrainCover = 19.2376 cm
D_SedSludgeOrifice = 0.013 m  # Diameter of drain orifices
W_SedInletBottom = 0.313812 m
N_SedSludgeOrifices = 21
ND_SedSludgeValve = 2 in
# Sedimentation Tank Dimensions:
Z_SedSludge = 0.119334 m  # Height from 0 of the top of the sludge drain
H_SedBottomSlope = 0.0526977 m  # Height of the bottom slope
H_SedTopSlope = 0.60684 m  # Height of the top of the inlet manifold
Z_SedSlopes = 0.726173 m  # Height from 0 of the top of the inlet manifold
W_Sed = 2.76 m  # Total tank wall height
L_Sed = 3.2795 m  # Total tank length
# Inlet Channel:
HW_InletChannel = 0.376108 m  # Width of the drop chimneys connecting channel to sed inlet manifolds
W_InletChannel = 0.376108 m  # length of drop chimmneys
L_Channel = 8.88 m
W_SedManifoldEntrance = 0.187 m
L_SedManifoldEntrance = 0.161412 m
H_SedManifoldPort = 0.169704 m  # Ports at bottom of inlet chimney are set to be triangles
W_SedManifoldPort = 0.248759 m
N_SedInletPipes = 2  # per sed bay
H_InletChannel = 0.476108 m
# Sedimentation Tank Effluent Launder:
N_SedLaunderOrifices = 46  # Number of orifices per launder
Q_SedLaunderOrifices = 2.657e-5 m^3/s  # More Launder Dimensions
ND_SedLaunder = 3 in
B_SedLaunderOrifices = 0.1 m  # Center to center launder spacing
L_SedLaunder = 2.44978 m
# Exit Channel:
D_SedLaunderOrifice = 0.314961 in
W_ExitChannel = 0.303615 m
H_ExitChannel = 0.476108 m
L_ExitChannel = 8.88 m
H_PltWeir = 0.281512 m  # height of the weir carrying water to the distribution tank
HW_ExitChannel = 0.336108 m  # water height in exit channel from 0
# Lamella:
L_SedPlate = 0.4572 m
B_SedPlate = 1.93353 cm  # center to center distance between lamella
S_SedPlate = 1.7 cm  # spacing between lamella
N_SedPlates = 94  # Number of Sed Plates per Sedimentation Tank Bay.
AN_SedPlate = 60 deg
ZW_ExitChannel = 1.37754 m
V_SedC = 10.4001 m/day
L_SedActive = 1.74556 m
T
V_SedUp = 70 m/day
Z_SedLaunder = 1.33309 m
H_SedPlate = 0.395947 m
H_SedAbove = 0.1289 m  # Height of water needed above the lamella
N_SedPlates = 94
HW_Sed = 1.41754 m
H_Sed = 1.51754 m
Z_Mp = 1.04143 m
N_SedPorts = 9
H_SedBayDivider = 0.796173 m
W_SedSlopePlateRemaining = 0.579503 m
W_SedBayDivider = 0.15 m
# Sedimentation Tank Floc Hopper:
A_FlocHopper = 0.76032 m^2
L_FlocHopper = 0.92722 m  # Length of the hopper cement plate
L_FlocHopperOffset = 0.2286 m  # distance from the edge of the channel to the bottom of the first lamella (collection distance)
W_FlocHopper = 0.82 m  # width of the hopper set within each bay
# Flow Controller:
N_Fcm = 3
ID_FcmTube = 4.318 mm
ID_FcmTube = 0.17 in
L_FcmTube = 292.682 cm
Q_FcmTubeMax = 330 mL/min
HL_FcmValve = 20.2324 cm
# Flocculator: | Look at Flocculator Positioning arrays
W_FlocChannel = 0.581221 m
# Fill last channel with bafffles from last channel
# Fix port width to be based on energy dissipation in that channel
ED_Floc = [20; 2] mW/kg
# Adjust spacing after the number of baffles per channel is known.
# Check the residence time of the flocculator should be at least 20minutes
HW_FlocEnd = 1.41754 m
X_FlocBaffles = [
    0.236625, 0.236625, 0.236625, 0.236625, 0.513251, 0.513251, 0.513251, 0.513251;
    0.513251, 0.513251, 0.513251, 0.513251, 1.0665, 1.0665, 1.0665, 1.0665;
    0.789876, 0.789876, 0.789876, 0.789876, 1.61975, 1.61975, 1.61975, 1.61975;
    1.0665, 1.0665, 1.0665, 1.0665, 2.173, 2.173, 2.173, 2.173;
    1.34313, 1.34313, 1.34313, 1.34313, 2.72625, 2.72625, 2.72625, 2.72625;
    1.61975, 1.61975, 1.61975, 1.61975, 0, 0, 0, 0;
    1.89638, 1.89638, 1.89638, 1.89638, 0, 0, 0, 0;
    2.173, 2.173, 2.173, 2.173, 0, 0, 0, 0;
    2.44963, 2.44963, 2.44963, 2.44963, 0, 0, 0, 0;
    2.72625, 2.72625, 2.72625, 2.72625, 0, 0, 0, 0;
    3.00288, 3.00288, 3.00288, 3.00288, 0, 0, 0, 0
] m
L_FlocBaffles = [
    1.54107, 1.54107, 1.54107, 1.54107, 1.26444, 1.26444, 1.26444, 1.26444;
    1.18091, 1.18091, 1.18091, 1.18091, 0.90429, 0.90429, 0.90429, 0.90429;
    1.54107, 1.54107, 1.54107, 1.54107, 1.26444, 1.26444, 1.26444, 1.26444;
    1.18091, 1.18091, 1.18091, 1.18091, 0.90429, 0.90429, 0.90429, 0.90429;
    1.54107, 1.54107, 1.54107, 1.54107, 1.26444, 1.26444, 1.26444, 1.26444;
    1.18091, 1.18091, 1.18091, 1.18091, 0, 0, 0, 0;
    1.54107, 1.54107, 1.54107, 1.54107, 0, 0, 0, 0;
    1.18091, 1.18091, 1.18091, 1.18091, 0, 0, 0, 0;
    1.54107, 1.54107, 1.54107, 1.54107, 0, 0, 0, 0;
    1.18091, 1.18091, 1.18091, 1.18091, 0, 0, 0, 0;
    1.54107, 1.54107, 1.54107, 1.54107, 0, 0, 0, 0
] m
Z_FlocBaffles = [
    0, 0, 0, 0, 0, 0, 0, 0;
    0.236625, 0.236625, 0.236625, 0.236625, 0.513251, 0.513251, 0.513251, 0.513251;
    0, 0, 0, 0, 0, 0, 0, 0;
    0.236625, 0.236625, 0.236625, 0.236625, 0.513251, 0.513251, 0.513251, 0.513251;
    0, 0, 0, 0, 0, 0, 0, 0;
    0.236625, 0.236625, 0.236625, 0.236625, 0, 0, 0, 0;
    0, 0, 0, 0, 0, 0, 0, 0;
    0.236625, 0.236625, 0.236625, 0.236625, 0, 0, 0, 0;
    0, 0, 0, 0, 0, 0, 0, 0;
    0.236625, 0.236625, 0.236625, 0.236625, 0, 0, 0, 0;
    0, 0, 0, 0, 0, 0, 0, 0
] m
N_FlocChannels = 8
L_FlocTank = 26.236 m
HL_Floc = 26.0155 cm
HW_FlocStart = 1.67769 m
S_FlocBaffle = [23.6625; 23.6625; 23.6625; 23.6625; 51.3251; 51.3251; 51.3251; 51.3251] cm
B_FlocBaffle = [27.6625; 27.6625; 27.6625; 27.6625; 55.3251; 55.3251; 55.3251; 55.3251] cm
N_FlocChannelBaffles = [11; 11; 11; 11; 5; 5; 5; 5]
W_FlocPort = [0.186625; 0.186625; 0.186625; 0.186625; 0.463251; 0.463251; 0.463251; 0.463251] m
HL_FlocChannels = [5.21465; 5.21465; 5.21465; 5.21465; 1.28922; 1.28922; 1.28922; 1.28922] cm
L_FlocBaffleLower = [1.18091; 1.18091; 1.18091; 1.18091; 0.90429; 0.90429; 0.90429; 0.90429] m
L_FlocBaffleUpper = [1.54107; 1.54107; 1.54107; 1.54107; 1.26444; 1.26444; 1.26444; 1.26444] m
H_FlocPort = [0.73694; 0.73694; 0.73694; 0.73694; 0.643954; 0.643954; 0.643954; 0.643954] m
Ti_Floc = 16.3757 min  # residence time of the flocculator
N_FlocBaffles = 64
# Rapid Mix Unit and Entrance Tank:
L_Et = 1.64786 m
W_Et = 1.64786 m
H_Et = 2.07769 m  # Height of Entrance Tank Orifice
W_EtOrifice[30] = 0.031 m
L_trueET[30] = 0.568761 m  # Length of Entrance Tank Orifice
Pi_EtFlow[30] = 0.278388  # Ratio of the minimum flow divided by the maximum flow through the plant.
L_FlocEntryOrifice = 58.1221 cm  # Length of orifice entering into flocculator from Rapid Mix Unit
W_FlocEntryOrifice = 4.39377 cm  # Height of orifice entering into flocculator
ED_Diffusion =  # error: This variable is undefined.  # Minimum Energy Dissipation needed
HL_FlocEntryOrifice = 5.64696 cm  # Head loss caused by entering flocculation tank.
A_FlocEntry = 0.0255375 m^2
A_EtOrifice = 176.316 cm^2
HW_EtTotal =  # error  # Total Height of water at beginning of rapid mix unit
HW_Channel2 =  # error  # Height of water at the back of the entrance tank channel (from channel bottom)
HW_EtChannel = 6.23229 cm  # Height of Waterfall into flocculator
W_EtChannel = 23.6625 cm  # Widt of entrance tank channel
Vol_Stock = 1782 L  # Volume of chemical stock tanks
ZW_ExitChannel = 1.37754 m  # Water Level at the end of the plant in the exit channel and exit channel box
HW_Sed = 1.41754 m
HW_FlocStart = 1.67769 m  # Water level at the beginning of the floc tank
HL_Floc = 26.0155 cm  # just for ref. the head loss throught the floc tank
HW_EtTotal =  # error  # Height of the water in the entrance channel
# Materials List:
L_LaunderPipe =  # error
N_Launders = 18
L_LaunderPipeTotal = 44.0961 m
N_Valves = 9
N_LaunderCouplings = 18
N_ValveCouplings = 9
N_SedPlatesTotal = 846
N_SedPlatesPerSheet = 8
N_SedPlateSheets = 106
N_PipeSedPlateStand =  # error
A_SedTank = 31.786 m^2
# [reference: AutoCADMasterProgram.xmcd]
# AutoCAD References
AC_SedTank = [
    "_-view o t"; "-layer m tank"; "c t 132,132,132"; "tank"; "  "; "_-view o t _zoom w 0.16,-0.16,0 -3.4395,2.92,1.51754 _box 0,0,0 -3.2795,2.76,1.51754 _box 0.15,-0.15,-0.15 -3.4295,2.91,1.51754 _subtract 0.15,-0.15,-0.15  0,0,0 "; "-layer s 0"; "  "; "-layer f tank"; "  "
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]
AC_EntranceTank = [
    "-layer m entrancetank";
    "c t 214,214,214";
    "entrancetank";
    "  ";
    "_-view o t _zoom w 0.16,14.41977,0 -1.80786,16.38762,2.07769 _box 0,14.57977,0 -1.64786,16.22762,2.07769 _box 0.15,14.42977,-0.15 -1.79786,16.37762,2.07769 _subtract 0.15,14.42977,-0.15  0,14.57977,0 ";
    "-layer s 0";
    "  ";
    "-layer f entrancetank";
    "  ";
    "-layer s entrancetank";
    "  ";
    "_box -1.64786,14.42977,2.02769 -1.41123,14.57977,2.07769";
    "-layer s 0";
    "  ";
    "-layer t entrancetank";
    "  ";
    "_-view o t";
    "_subtract 0.15,14.57977,0  -1.64786,14.42977,2.02769 ";
    "-layer f entrancetank";
    "  "
]
AC_FlocTank = [
    "-layer m floctank"; "c t 91,91,91"; "floctank"; "  "; "_-view o t _zoom w 0.16,8.57,0 -3.4395,14.58977,1.77769 _box 0,8.73,0 -3.2795,14.42977,1.77769 _box 0.15,8.58,-0.15 -3.4295,14.57977,1.77769 _subtract 0.15,8.58,-0.15  0,8.73,0 "; "-layer s 0"; "  "; "-layer f floctank"; "  "; "-layer m floctankwall"
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]
