# Unit Processes Design
# References
# Fluids Functions
# [reference: FluidsFunctions.xmcd]
# Design Assumptions
# [reference: DesignAssumptions.xmcd]
# Sedimentation Tank Design
SedTankDesign(Q_plant, SedTank_width, lamella_spacing, L_lamella, β) :=
    Q_tank ← Q_plant/n_sedtanks
    spacebelow_slanted ← (SedTank_width/2)*tan(β)
    spacebelow_straight ← spacebelow_total - spacebelow_slanted
    angle_toosteep ← "Failure: Slope of walls too steep (should be less than 60 deg)."
    return angle_toosteep if spacebelow_slanted > 1 m
    spaceabove ← ratio_waterdepthtolaunderspacing*SedTank_width
    H_lamella ← L_lamella*sin(α)
    H_tank ← H_lamella + spaceabove + spacebelow_total + freeboard_sed
    v_c ← v_up/(1 + L_lamella/lamella_spacing*cos(α)*sin(α))
    vc_toobig ← "Failure: Critical velocity is greater than the suggested value"
    return vc_toobig if v_c > criticalvelocity_toobig
    A_active ← Q_tank/v_up
    L_active ← A_active/SedTank_width
    L_tank ← (L_lamella*cos(α) + L_active)
    N_lamella ← L_active/(lamella_spacing/sin(α))
    sedtank_vol ← 3*((SedTank_width*(H_tank - spacebelow_total)*L_tank) + .5*(SedTank_width*spacebelow_total*L_tank))
    sedtank_dim ← [L_tank; SedTank_width; H_tank]
    return [sedtank_dim/m, N_lamella]
# calculated so tank comes to a point at the drain pipe
# ratio between water depth above the plate settles and launder spacing (assuming 1 launder per tank)
# sum of the space below the lamella, space above the lamella,
# and the length of the lamella
# puts the dimensions of the sed tank in a 3 x 1 vector
# returns the sed tank dimensions and the number of lamella
# Flocculator Design
flocculator(Q_plant, SedTank_width, L_lamella, β, lamella_spacing) :=
    SedTankDim ← SedTankDesign(Q_plant, SedTank_width, lamella_spacing, L_lamella, β)[0, 0]*m
    FlocTank_length ← SedTankDim[0]*n_channels
    FlocTank_width ← SedTankDim[1]/n_channels
    FlocTank_enddepth ← SedTankDim[2] - freeboard_sed
    baffle_spacing ← (1/G)^(1/2)*(k_b*Q_plant^3/(2*Π_cell*ν*FlocTank_width^3))^(1/4)
    gap ← 1.5*baffle_spacing
    G_min ← G*flowratio_hightolowflow^(3/2)
    θ_min ← Π_cell*FlocTank_width*baffle_spacing^2/Q_plant
    Gθ_minpersection ← Gθ_min*θ_min/sum(θ_min)
    n_baffle ← ceil(vectorize(Gθ_minpersection/(G_min*θ_min)))
    baffle_length ← FlocTank_enddepth - gap
    v ← Q_plant/(FlocTank_width*baffle_spacing)
    h_l ← vectorize(n_baffle*(k_b*v^2/(2*g)))
    total_hl ← sum(h_l)
    d_start ← FlocTank_enddepth + total_hl
    floc_dim ← [FlocTank_length; FlocTank_width; d_start + freeboard_floc]
    floc_inleth ← 1.5 m
    return [floc_dim/m, baffle_spacing/m, floc_inleth/m, n_baffle, total_hl/m]  # Index 0,0 is calling sed tank dimensions :Length,Width, Height
# Subtract freeboard to get only the water depth in sed tank
flocculator(740*L/min, 42 in, 1 m, 0 deg, 5 cm) = [[7.65917; 0.5334; 2.266], [0.135435; 0.28307; 0.400322], 1.5, [3; 10; 19], 0.0332755]
floclength := flocculator(740*L/min, 42 in, 1 m, 0 deg, 5 cm)[0, 1]*flocculator(740*L/min, 42 in, 1 m, 0 deg, 5 cm)[0, 3]
floclength = 10.8431
# Chemical Feed Design
ChemicalFeed(Q_plant) :=
    Q_alum ← Q_plant*Al_maxdose/Al_stock
    return Q_alum
